<?xml version="1.0"?>

<!--
  File:     trent_xwb.xml
  Author:   AeromatiC++ v 3.3.20

  See: http://wiki.flightgear.org/JSBSim_Engines#FGTurbine

  Inputs:
    name:                    trent_xwb
    type:                    Turbine Engine
    thrust:                  97000.0 lbf
    bypass ratio:            9.600:1
    overall pressure ratio:  50.0:1
    augmented?               no
    injected?                no

  Outputs
    tsfc:                    0.5
    engine weight:           0.0 lbs
    engine length:           0.0 ft
    engine diameter:         0.0 ft
-->

<turbine_engine name="trent_xwb">
  <milthrust> 97000.0 </milthrust>
  <bypassratio>     9.600 </bypassratio>
  <tsfc>            0.515 </tsfc>
  <bleed>           0.03</bleed>
  <idlen1>         21.4 </idlen1> <!-- Lego-Boy commited this (Need to double check numbers)-->
  <idlen2>         60.0 </idlen2>
  <maxn1>         99.1 </maxn1> <!-- Double check-->
  <maxn2>         100.2 </maxn2> <!-- Double check-->
  <augmented>         0 </augmented>
  <injected>          0 </injected>

  <function name="IdleThrust">
   <table>
    <independentVar lookup="row">velocities/mach</independentVar>
    <independentVar lookup="column">atmosphere/density-altitude</independentVar>
    <tableData>
         -10000     0     10000   20000   30000   40000   50000   90000
     0.0  0.0430  0.0488  0.0528  0.0694  0.0899  0.1183  0.1467  0
     0.2  0.0500  0.0501  0.0335  0.0544  0.0797  0.1049  0.1342  0
     0.4  0.0040  0.0047  0.0020  0.0272  0.0595  0.0891  0.1203  0
     0.6 -0.0804 -0.0804 -0.0560 -0.0237  0.0276  0.0718  0.1073  0
     0.8 -0.2129 -0.2129 -0.1498 -0.1025  0.0474  0.0868  0.0900  0
     1.0 -0.2839 -0.2839 -0.1104 -0.0469 -0.0270  0.0552  0.0800  0
    </tableData>
   </table>
  </function>

  <function name="MilThrust">
   <table>
    <independentVar lookup="row">velocities/mach</independentVar>
    <independentVar lookup="column">atmosphere/density-altitude</independentVar>
    <tableData>
          -10000       0   10000   20000   30000   40000   50000   60000   90000
      0.0  1.2600  1.0000  0.7400  0.5340  0.3720  0.2410  0.1490  0.0580  0
      0.2  0.9237  0.7367  0.5498  0.3991  0.2800  0.1822  0.1128  0.0316  0
      0.4  0.6642  0.5320  0.3997  0.2923  0.2062  0.1346  0.0838  0.0248  0
      0.6  0.4327  0.3484  0.2642  0.1949  0.1385  0.0909  0.0564  0.0172  0
      0.8  0.1952  0.1583  0.1214  0.0903  0.0647  0.0427  0.0264  0.0082  0
      1.0 -0.0767 -0.0627 -0.0488 -0.0365 -0.0266 -0.0176 -0.0109 -0.0035  0
      1.2 -0.3968 -0.3287 -0.2605 -0.1988 -0.1456 -0.0973 -0.0601 -0.0198  0
      1.4 -0.7626 -0.6411 -0.5195 -0.4042 -0.3004 -0.2028 -0.1258 -0.0431  0
    </tableData>
   </table>
  </function>

</turbine_engine>
